*Heading
** Job name: JobP04V3 Model name: Model-1
** Generated by: Abaqus/CAE 6.13-1
*Preprint, echo=NO, model=NO, history=NO, contact=NO
**
** PARTS
**
*Part, name=Part-3
*End Part
**
*Part, name=Part-4
*End Part
**
**
** ASSEMBLY
**
*Assembly, name=Assembly
**
*Instance, name=Part-3-1, part=Part-3
*End Instance
**
*Instance, name=Part-4-1, part=Part-4
*End Instance
**
*Instance, name=Part-3-2, part=Part-3
    3.222038,     3.222038,           0.
*End Instance
**
*Instance, name=Part-4-2, part=Part-4
*Node
      1,   2.04880691,  -2.43203425
      2,   1.02657664,  -3.00974083
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*Element, type=CPS4
1	,	1839	,	2408	,	793	,	794
2	,	2402	,	14224	,	2476	,	2404
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*USER ELEMENT, TYPE=U1, NODE=4, COORDINATES=2, PROPERTIES=14, VARIABLES=30
1, 2
**	*ELEMENT, TYPE=U1, ELSET=FailedCZE
*ELEMENT, TYPE=U1, ELSET=AliveCZE
36140	,	833	,	832	,	36234	,	36235
36141	,	834	,	833	,	36235	,	36236
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*Nset, nset=Set-1, generate
     1,  36195,      1
*Elset, elset=Set-1, generate
     1,  36101,      1
*Nset, nset=Set-2, generate
     1,  36195,      1
*Elset, elset=Set-2, generate
     1,  36101,      1
** Section: Section-1
*Solid Section, elset=Set-2, material=Material
1.8,
*UEL PROPERTY, ELSET=AliveCZE
10.9e3, 10e3, 529e3, 529e3, 2, 2, 0.0005, 0.0005,
1.8, 2, 2, 2, 2, 0
**	*UEL PROPERTY, ELSET=FailedCZE
**	10.9e3, 10e3, 529e3, 529e3, 2, 2, 0.0005, 0.0005,
**	1.8, 2, 2, 2, 2,1
*End Instance
**
*Nset, nset=Set-8, instance=Part-4-2
   29,   30,   31,   32,   33,   34
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*Elset, elset=Set-8, instance=Part-4-2
    14,    15,    16,    17,    18,    99
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*Nset, nset=Set-9, instance=Part-4-2
   57,   58,   59,   60,   61,   62
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*Elset, elset=Set-9, instance=Part-4-2
  348,  351,  353,  357,  359,  362
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*Elset, elset=_Surf-1_S2, internal, instance=Part-4-2
  496,  651, 1069, 1113, 1156, 1210, 1607, 1609, 1610
*Elset, elset=_Surf-1_S1, internal, instance=Part-4-2
   499,   669,   711,  1222,  1611, 10891, 18751, 18754, 21081
*Elset, elset=_Surf-1_S4, internal, instance=Part-4-2
  654,  656,  660,  707, 1052, 1088, 1191, 1580, 1605, 1606, 1608, 4022
*Elset, elset=_Surf-1_S3, internal, instance=Part-4-2
   663,   674,   685,   696,   701,  1616,  2649,  5504,  8721, 18740, 18749, 18755, 18766, 19668
*Surface, type=ELEMENT, name=Surf-1
_Surf-1_S2, S2
_Surf-1_S1, S1
_Surf-1_S4, S4
_Surf-1_S3, S3
*Elset, elset=_Surf-2_S2, internal, instance=Part-4-2
   44,   45,  237,  293,  347,  372,  393,  530,  642, 1603
*Elset, elset=_Surf-2_S4, internal, instance=Part-4-2
  210,  265,  292,  392, 1604
*Elset, elset=_Surf-2_S1, internal, instance=Part-4-2
 320, 346, 371, 412, 473, 515, 529, 542, 568, 590, 603, 617, 618, 631, 651
*Elset, elset=_Surf-2_S3, internal, instance=Part-4-2
   411,   426,   447,   460,   541,   554,   567,   630, 18837, 18838
*Surface, type=ELEMENT, name=Surf-2
_Surf-2_S2, S2
_Surf-2_S4, S4
_Surf-2_S1, S1
_Surf-2_S3, S3
*End Assembly
*Amplitude, name=Amp-1, definition=PERIODIC
1,            6.28,           -0.75,          49500.
             0.,          40500.
**
** MATERIALS
**
*Material, name=Material
*Elastic
 7.17e+07, 0.33
***Plastic
**503000.,   0.
**570000., 0.08
** ----------------------------------------------------------------
**
** STEP: Step-1
**
** *Step, name=Step-1, nlgeom=YES, inc=1000000
** *Static
** 0.1, 2., 1e-10, 0.1
*Step, name=Step-1, nlgeom=YES, inc=1000000
*Static, stabilize=0.002, allsdtol=0.05, continue=NO
0.01, 10., 1e-10, 0.1
**
** BOUNDARY CONDITIONS
**
** Name: BC-1 Type: Displacement/Rotation
*Boundary
Set-8, 2, 2
Set-8, 6, 6
** Name: BC-2 Type: Displacement/Rotation
*Boundary
Set-9, 1, 1
Set-9, 6, 6
**
** LOADS
**
*** *** Name: Load-1   Type: Surface traction
*Dsload, amplitude=Amp-1
Surf-1, TRVEC, 1., -1., 0., 0.
** Name: Load-2   Type: Surface traction
*Dsload, amplitude=Amp-1
Surf-2, TRVEC, 1., 0., 1., 0.
**
** OUTPUT REQUESTS
**
*Restart, write, frequency=0
**
** FIELD OUTPUT: F-Output-1
**
*Output, field, variable=PRESELECT
**
** HISTORY OUTPUT: H-Output-1
**
*Output, history, variable=PRESELECT
*End Step
